OpenVSP model (file version 5), 6 components.
Geometry view with OpenVSP parameter names; values to 6 digits, angles in degrees, lengths in the model's unit.
Overall bounding box: X_Min=-2.57867 X_Len=72.5787 Y_Min=-31.2295 Y_Len=62.459 Z_Min=-10.0502 Z_Len=23.7782

Fuselage "FuselageGeom"
  location (X Y Z) 0 0 0, rotation 0 0 0
  bounding box size 70 6.20987 6.20987
  Design: Length=70
  cross sections:
    n  XLocPercent  YLocPercent  ZLocPercent  shape
    0  0            0            0            point
    1  0.25         0            0            ellipse Ellipse_Height=3 Ellipse_Width=2.5
    2  0.5          0            0            as above
    3  0.75         0            0            as above
    4  1            0            0            point

Wing "WingGeom", child of "FuselageGeom"
  location (X Y Z) 10 1.22951 0, rotation 0 0 0
  symmetric about XZ
  bounding box size 21.6709 62.459 1.74016
  totals: TotalSpan=60 TotalProjectedSpan=60 TotalChord=10.876 TotalArea=652.559 TotalAR=5.51674
  root: chord 17.4016, twist 0, biconvex ThickChord=0.1
  sections:
    n  Span  Root_Chord  Tip_Chord  Area    Sweep  Sweep_Location  Dihedral  Twist  Twist_Location  tip airfoil
    1  30    17.4016     4.35039    326.28  30     0               0         0      0.25            NACA 4-series Camber=0 CamberLoc=0.2 ThickChord=0.1

Stack "StackGeom", child of "FuselageGeom"
  location (X Y Z) -2.13115 0 0, rotation 0 0 0
  bounding box size 3.01542 1.77778 1.48148
  cross sections:
    n  XDelta    YDelta  ZDelta  shape
    0  0         0       0       point
    1  0.592593  0       0       ellipse Ellipse_Height=1.48148 Ellipse_Width=1.77778
    2  1.18519   0       0       as above
    3  0.592593  0       0       as above
    4  -2.37037  0       0       point

Propeller "PropGeom"
  location (X Y Z) 0 0 0, rotation 0 0 0
  bounding box size 1.02246 20.7459 20.1004
  Design: Diameter=20.7087 NumBlade=10 Beta34=20 UseBeta34Flag=1 Feather=0 Rotate=0 Precone=0 ReverseFlag=0 FoldAngle=0 PropMode=0 AF=152.42 CLi=0.544093 Chord=0.175004 Solidity=0.557056 ConstructXoC=0.5 FeatherAxisXoC=0.5 FeatherOffsetXoC=0
  cross sections:
    n  RadiusFrac  shape
    0  0.0721311   circle Circle_Diameter=0.828346 DeltaX=0.00714286 Theta=0.714286
    1  0.4         NACA 16-series Chord=1.8648 IdealCl=0.735319 ThickChord=0.144074
    2  1           NACA 16-series Chord=1.34606 IdealCl=0.2 ThickChord=0.03
  Chord along r/R (cubic Bezier): 0.0721311: 0.08, 0.226776: 0.141522, 0.381421: 0.187595, 0.536066: 0.197853, 0.613388: 0.202982, 0.69071: 0.2, 0.768033: 0.2, 0.806694: 0.2, 0.845355: 0.2, 0.884016: 0.2, 0.903347: 0.2, 0.922678: 0.2, 0.942008: 0.2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
  Twist along r/R (cubic Bezier): 0.0721311: 46.75, 0.381421: 31.955, 0.69071: 20.705, 1: 13
  Thick along r/R (cubic Bezier): 0.0721311: 0.5, 0.149454: 0.296403, 0.226776: 0.253591, 0.304098: 0.196962, 0.381421: 0.140334, 0.458743: 0.121995, 0.536066: 0.109586, 0.69071: 0.0847689, 0.845355: 0.0589959, 1: 0.03
  CLI along r/R (cubic Bezier): 0.0721311: 0, 0.226776: 0.9905, 0.381421: 0.7, 0.536066: 0.7, 0.69071: 0.7, 0.845355: 0.779918, 1: 0.2

Seat "Seat", child of "PropGeom"
  location (X Y Z) 10 0 0, rotation 0 -90 0
  bounding box size 9.01528 4.38588 13.728
  Design: BackAngle=6 BackHeight=6.9239 BackThick=0.654465 SeatHeight=6.51478 SeatLength=7.96789 Width=4.38588
  custom script Seat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

Human "HumanGeom", child of "Seat"
  location (X Y Z) 10 0 7.5, rotation 0 0 0
  mass: Density=29.4062 Shell_Flag=0 Mass_Area=1 Mass_Prior=0
  Anthropometric: Age=29.1818 AutoDensity=1 BMI=39.8 BMI_pct=0.95 GenderFlag=0 LenUnit=4 Mass=140.819 MassUnit=1 SitFrac=0.51 Stature=6.17126 Stature_pct=0.95 Volume=4.78874
